<?xml version="1.0"?>
<Node name="Root" gravity="0 0 0" time="0" animate="0">

    <Node name="Plugins">
        <RequiredPlugin name="SofaDiff" pluginName="SofaDiff"/>
        <RequiredPlugin name="Sofa.Component.Mass"/> <!-- Needed to use components [UniformMass] -->
        <RequiredPlugin name="Sofa.Component.ODESolver.Forward"/> <!-- Needed to use components [EulerExplicitSolver] -->
        <RequiredPlugin name="Sofa.Component.StateContainer"/> <!-- Needed to use components [MechanicalObject] -->
        <RequiredPlugin name="Sofa.Component.Mapping.NonLinear"/> <!-- Needed to use components [RigidMapping] -->
    </Node>

    <DefaultAnimationLoop/>
    <GradientDescentController name="controller"/>

    <Node name="DOFs">
        <EulerExplicitSolver name="ODE solver"/>
        <MechanicalObject template="Rigid3d" name="dofs" position="0 0 0  0 0 0 1"/>
		<UniformMass template="Rigid3d" name="uniformMass" totalMass="1.0"/>

        <Node name="Endpoint">
            <MechanicalObject template="Vec3d" name="endpoint_mo" position="0.2 0.1 0.1"/>
            <RigidMapping input="@.."/>
        </Node>
    </Node>

    <Node name="Error">
        <MechanicalObject template="Vec1d" name="error" position="0"/>
        <DistanceToPlaneCost template="Vec3d" input="@../DOFs/Endpoint" planeNormal="2 0 0" planePoint="0 0 0"/>
    </Node>
</Node>
